C_MS := 0.821 mm/N
S_d := 119 cm^2 = 0.0119 m^2
V_as := 16.5 L = 0.0165 m^3
M_md := 13.955 gm = 0.013955 kg
M_MS := 14.7 gm = 0.0147 kg
Q_MS := 3.246
Q_es := 0.452
Q_ts := 0.397
R_E := 7.2 Ω
BL := 8.2 T*m = 8.2 kg*m/(s^2*A)
B := 1 T
l_e := BL/B = 8.2 m
1.41*6 Ω/(2*π*1000*1/s) = 0.00134645 H
Dia_coil := 36 mm
Omk_coil := Dia_coil*π = 0.113097 m
N_vikling := l_e/Omk_coil = 72.5039
L_e := N^2/l_e = 0.121951 kg^2*m/s^4
L_E := 1 mH = 0.001 H
# Det elektriske system (jvf Tore s. 34)
U_G := 1 V
P_G := 1 W
I_G := P_G/U_G = 1 A
R_G := 0.1 Ω
f_1 := R_E/(2*π*L_E) = 1145.92 1/s
# Det mekaniske system (s. 35)
f_s := 1/(2*π*sqrt(M_MS*C_MS)) = 45.8131 1/s
R_MS := 1/Q_MS*sqrt(M_MS/C_MS) = 1.30358 N*s/m
i_E := I_G = 1 A
F_M := BL*i_E = 8.2 N
# Elektrisk og mekanisk impedans
ω_s := 1/sqrt(M_MS*C_MS) = 287.852 1/s
f_s = 45.8131 1/s
j := 1j
ω_tot := 0.1*1/s
f =  # error: This variable is undefined. Check that the label is set correctly.
Z_E(f) := R_E + (f*j*2*π)*L_E + BL^2/(ω_s*M_MS)*ω_s*(f*j*2*π)/((f*j*2*π)^2 + 1/Q_MS*ω_s*(f*j*2*π) + ω_s^2)
Z_E(45*1/s) = (58.093 + 6.19983i) Ω
f := 10*1/s, 11*1/s .. 20000*1/s
f_optil1 := 1*1/s, 2*1/s .. f_1
f_fra1 := f_1 - 1000*1/s, (f_1 - 1000*1/s) + 1*1/s .. 20000*1/s
Z_E.ny(f)
# [plot: R_E + f_fra1*L_E, |Z_E(f_optil1)| (Ω) vs f_fra1 (1/s), f_optil1]
Z_max := R_E + BL^2/R_MS = 58.7809 Ω
f_1 := L_E/(2*π*R_E) = 2.21049e-5 s
1/f_1 = 45238.9 1/s
# Det samlede impedans system (s. 38 elektroakustik)
s_var := 1
1/(s_var*C_mass) == BL^2/(s_var*M_MS) solve, C_mass → 0.000218619869126*A^2*s^4/(kg*m^2) =  # error
v_M := U_G/BL = 0.121951 m/s
p := F_M/S_d = 689.076 Pa
q := S_d*v_M = 0.00145122 m^3/s
Z_A := p/q = 474825 kg/(m^4*s)
Z_M := S_d^2*Z_A = 67.24 kg/s
C_mass := (2.186*10^-4) F
L_styr := C_MS*BL^2 = 0.055204 H
R_M.tab := BL^2/R_MS = 51.5809 Ω
R_E = 7.2 Ω
L_E = 0.001 H
R_A.bagside := BL^2/(S_d^2*Z_A) = 1 Ω
# Strålingsimpedanser s.40
ρ := 1.18 kg/m^3 = 1.18 kg/m^3
c := 344 m/s = 344 m/s
S_d == r_coil^2*π solve, r_coil → [sqrt(37878876455871089913)*m/100000000000; -sqrt(37878876455871089913)*m/100000000000] =  # error
r_coil := sqrt(37878876455871089913)*m/100000000000 = 0.0615458 m
R_AR(f) := π*ρ/c*f
R_MR(f) := π*ρ/c*(S_d*f)^2
f_max := c/(2*π*r_coil) = 889.57 1/s
M_MR := 8*ρ*r_coil^3/45 = 0.0489052 gm
M_AR := 8*ρ/(45*π^2*r_coil) = 0.345351 kg/m^4
f := 0*1/s, 1*1/s .. f_max
# [plot: R_AR(f), R_MR(f) vs f]
Z_AR := R_AR(45) = 0.484938 kg*s/m^4
BL^2/(S_d^2*Z_AR) = 979147 Ω/s^2
# Lydtryk
r := 1 m
P_2π(f) := ρ*f/r*q
P_2π(45) = 0.0770598 kg/(m*s)
P_2π.rms(f) := 0.707*P_2π(f)
P_ref := 20*10^-6 = 2e-5
SPL(f) := 20*log(P_2π.rms/P_ref)
SPL(45) =  # error: This value must be a scalar or a matrix.
P_2π.rms(45) = 0.0544812 kg/(m*s)
f := 0*1/s, 11*1/s .. 20000*1/s
# [plot: P_2π.rms(f) vs f]
r_P := 5/2*10^-2 m
S_P := r_P^2*π = 0.0019635 m^2
L_P := 7*10^-2 m
V_port := S_P*L_P = 0.137445 L
r_p.ydre := r_P + 0.5/2*10^-2 m = 0.0275 m
S_P.ydre := r_p.ydre^2*π = 0.00237583 m^2
V_port.ydre := S_P.ydre*L_P = 0.166308 L
r_dims := 2.5/2*10^-2 m
l_dims := 20*10^-2 m
V_dims := r_dims^2*π*l_dims = 0.0981748 L
r_speaker1 := (168/2) mm = 0.084 m
r_speaker2 := r_speaker1 - 55 mm = 0.029 m
h_speaker := 79.5 mm
V_speaker := 1/3*π*h_speaker*(r_speaker1^2 + r_speaker2^2 + r_speaker1*r_speaker2) = 0.860245 L
V_fyld := V_port.ydre + V_dims + V_speaker = 1.12473 L
V_speaker := 330 mm*200 mm*270 mm = 17.82 L
# Kabinet s. 50
V_B := V_speaker - V_fyld = 16.6953 L
P_0 := 100*10^3 Pa
γ := 1.4
c = 344 m/s
C_AB := V_B/(ρ*c^2) = 1.19562e-7 m^4*s^2/kg
ρ = 1.18 kg/m^3
C_AB := V_B/(γ*P_0) = 1.19252e-7 m^4*s^2/kg
C_MB := C_AB/S_d^2 = 0.000842115 s^2/kg
C_RES := C_MS*C_MB/(C_MS + C_MB) = 0.000415712 s^2/kg
Q_ts = 0.397
Q_ts*1.41 = 0.55977
f_c.lukket := 1/(2*π*sqrt(M_MS*C_RES)) = 64.3821 1/s
Q_TS.lukket := 1/(BL^2/R_E + R_MS)*sqrt(M_MS/C_RES) = 0.558753
ρ_0 := 1.18 kg/m^3
P_0 = 100000 Pa
M_AP := ρ_0/S_P*(L_P + 1.5*sqrt(S_P/π)) = 64.6042 kg/m^4
M_AS := M_MS/S_d^2 = 103.806 kg/m^4
C_AS := C_MS*S_d^2 = 1.16262e-7 m^4*s^2/kg
R_AS := R_MS/S_d^2 = 9205.44 kg/(m^4*s)
f_c.kabinet := 1/(2*π*sqrt(M_AS*C_AS*C_AB/(C_AS + C_AB))) = 64.3821 1/s
45*1.41 = 63.45
f_port := 1/(2*π*sqrt(M_AP*C_AB)) = 57.3399 1/s
f_m := 1/(2*π*sqrt((M_AS + M_AP)*C_AB)) = 35.5143 1/s
1/(2*π*sqrt((ρ_0/S_P*(L_Pp + 1.5*sqrt(S_P/π)))*C_AB)) == 45*1/s solve, L_Pp → 8.72705385622*10^-25*(2.0*10^23*kg*m^3*s^2 - 1.71879310557*10^24*m^2*s^2*kg*sqrt(0.000625*m^2))/(m^2*s^2*kg) =  # error
8.83033569882*10^-25*(2.0*10^23*kg*m^3*s^2 - 1.69868966612*10^24*m^2*s^2*kg*sqrt(0.000625*m^2))/(m^2*s^2*kg) = 0.139107 m
# Frekvensrespons s. 60
U_G := 2.75 V
U_G^2/R_E = 1.05035 W
R_AE := BL^2/(R_E*S_d^2) = 65947.9 s*kg/(m^4*s^2)
F_A := S_d*U_G/(R_E*BL) = 0.000554285 N/T^2
Z_lukket(f) := R_AE + (f*j*2*π)*M_AS + 1/((f*j*2*π)*C_AS) + R_AS + 1/((f*j*2*π)*C_AB)
f := 0*1/s, 1*1/s .. 20000*1/s
r_mic := 1 m
q_F(f) := F_A/Z_lukket(f)
p_2π(f) := ρ*(f*j*2*π)/(2*π*r_mic)*q_F(f)
# [plot: |p_2π(f)| vs f]
Z_basrefleks(f) := R_AE + (f*j*2*π)*M_AS + 1/((f*j*2*π)*C_AS) + R_AS + 1/((f*j*2*π)*C_AB + 1/((f*j*2*π)*M_AP))
f := 0*1/s, 1*1/s .. 20000*1/s
r_mic := 1 m
q_F(f) := F_A/Z_basrefleks(f)
q_P(f) := -1/((f*j*2*π)*C_AB)/(1/((f*j*2*π)*C_AB) + (f*j*2*π)*M_AP)*q_F(f)
p_2π(f) := ρ*(f*j*2*π)/(2*π*r_mic)*(q_F(f) + q_P(f))
p_ref := 20*10^-6 Pa
L(f) := 20*log(ρ*f/r_mic*(q_F(f) + q_P(f))/p_ref)
# [plot: |p_2π(f)| vs f]
