C_MS := 0.821 mm/N
S_d := 119 cm^2 = 0.0119 m^2
V_as := 16.5 L = 0.0165 m^3
M_md := 13.955 gm = 0.013955 kg
M_MS := 14.7 gm = 0.0147 kg
Q_MS := 3.246
Q_es := 0.452
Q_ts := 0.397
R_E := 7.2 Ω
BL := 8.2 T*m = 8.2 kg*m/(s^2*A)
B := 1 T
l_e := BL/B = 8.2 m
1.41*6 Ω/(2*π*1000*1/s) = 0.00134645 H
Dia_coil := 36 mm
Omk_coil := Dia_coil*π = 0.113097 m
N_vikling := l_e/Omk_coil = 72.5039
L_e := N^2/l_e = 0.121951 kg^2*m/s^4
L_E := 1 mH = 0.001 H
# Det elektriske system (jvf Tore s. 34)
U_G := 1 V
P_G := 1 W
I_G := P_G/U_G = 1 A
R_G := 0.1 Ω
f_1 := R_E/(2*π*L_E) = 1145.92 1/s
# Det mekaniske system (s. 35)
f_s := 1/(2*π*sqrt(M_MS*C_MS)) = 45.8131 1/s
R_MS := 1/Q_MS*sqrt(M_MS/C_MS) = 1.30358 Ω*s^2*A^2/m^2
i_E := I_G = 1 A
F_M := BL*i_E = 8.2 N
# Elektrisk og mekanisk impedans
ω_s := 1/sqrt(M_MS*C_MS) = 287.852 1/s
f_s = 45.8131 1/s
j := 1j
ω_tot := 0.1*1/s
f =  # error: This variable is undefined. Check that the label is set correctly.
Z_E(f) := R_E + (f*j*2*π)*L_E + BL^2/(ω_s*M_MS)*ω_s*(f*j*2*π)/((f*j*2*π)^2 + 1/Q_MS*ω_s*(f*j*2*π) + ω_s^2)
Z_E(45*1/s) = (58.093 + 6.19983i) Ω
f := 10*1/s, 11*1/s .. 20000*1/s
Z_E.ny(f)
# [plot: R_E + f*L_E, |Z_E(f)| (Ω) vs f (1/s)]
Z_max := R_E + BL^2/R_MS = 58.7809 Ω
f_1 := L_E/(2*π*R_E) = 2.21049e-5 s
1/f_1 = 45238.9 1/s
# Det samlede impedans system (s. 38 elektroakustik)
s_var := 1
1/(s_var*C_mass) == BL^2/(s_var*M_MS) solve, C_mass → 0.000218619869126*A^2*s^4/(kg*m^2) =  # error
v_M := U_G/BL = 0.121951 m/s
p := F_M/S_d = 689.076 Pa
q := S_d*v_M = 0.00145122 m^3/s
Z_A := p/q = 474825 kg/(m^4*s)
Z_M := S_d^2*Z_A = 67.24 kg/s
C_mass := (2.186*10^-4) F
L_styr := C_MS*BL^2 = 0.055204 H
R_M.tab := BL^2/R_MS = 51.5809 Ω
R_E = 7.2 Ω
L_E = 0.001 H
R_A.bagside := BL^2/(S_d^2*Z_A) = 1 Ω
